MACE 1
0.000
0 0 0.000
0.990 0.247 2.000
-0.312 0.000 0.000

SURFACE
btm_wing
12 0.000 20 0.000
COMPONENT
1
YDUPLICATE
0.000
TRANSLATE
0.250 0.000 -0.250
SECTION
0.000 0.000 0.000 0.300 0.000
SECTION
0.000 0.300 0.000 0.300 0.000
SECTION
0.011 1.000 0.000 0.257 0.000

SURFACE
top_wing
12 0.000 20 0.000
COMPONENT
1
YDUPLICATE
0.000
TRANSLATE
0.250 0.000 0.250
SECTION
0.000 0.000 0.000 0.300 0.000
SECTION
0.000 0.300 0.000 0.300 0.000
SECTION
0.011 1.000 0.000 0.257 0.000

SURFACE
side_wing
12 0.000 20 0.000
COMPONENT
1
YDUPLICATE
0.000
TRANSLATE
0.250 0.250 0.400
SECTION
0.000 0.000 0.000 0.250 0.000
SECTION
-0.025 0.000 -0.200 0.350 0.000
SECTION
0.000 0.000 -0.600 0.350 0.000
SECTION
0.025 0.000 -0.800 0.250 0.000

SURFACE
btm_tail
12 0.000 20 0.000
COMPONENT
2
YDUPLICATE
0.000
TRANSLATE
1.800 0.000 -0.250
SECTION
0.000 0.000 0.000 0.200 0.000
SECTION
0.000 0.250 0.000 0.200 0.000

SURFACE
top_tail
12 0.000 20 0.000
COMPONENT
2
YDUPLICATE
0.000
TRANSLATE
1.800 0.000 0.250
SECTION
0.000 0.000 0.000 0.200 0.000
SECTION
0.000 0.250 0.000 0.200 0.000

SURFACE
side_tail
12 0.000 20 0.000
COMPONENT
2
YDUPLICATE
0.000
TRANSLATE
1.800 0.250 -0.250
SECTION
0.000 0.000 0.000 0.200 0.000
SECTION
0.000 0.000 0.500 0.200 0.000
