MACE0
0.000
0 0 0.000
1.285 0.259 4.954
0.500 0.000 0.000


SURFACE
main_wing_panel_0
12 1.000 20 1.000
COMPONENT
1
YDUPLICATE
0.000
TRANSLATE
0.400 0.000 0.000
SECTION
0.000 0.000 0.000 0.290 2.019
CLAF
1.149
AFILE
SG6041.dat
SECTION
0.000 1.260 0.000 0.290 2.019
CLAF
1.149
AFILE
SG6041.dat

SURFACE
main_wing_panel_1
12 1.000 20 1.000
COMPONENT
1
YDUPLICATE
0.000
TRANSLATE
0.400 1.260 0.000
SECTION
0.000 0.000 0.000 0.290 2.019
CLAF
1.149
AFILE
SG6041.dat
SECTION
0.002 0.305 0.000 0.281 1.975
CLAF
1.156
AFILE
SG6041.dat
SECTION
0.008 0.542 0.000 0.260 1.876
CLAF
1.174
AFILE
SG6041.dat
SECTION
0.014 0.725 0.000 0.233 1.649
CLAF
1.187
AFILE
SG6041.dat
SECTION
0.022 0.866 0.000 0.204 1.424
CLAF
1.202
AFILE
SG6041.dat
SECTION
0.029 0.976 0.000 0.173 1.343
CLAF
1.220
AFILE
SG6041.dat
SECTION
0.037 1.061 0.000 0.142 1.261
CLAF
1.239
AFILE
SG6041.dat
SECTION
0.045 1.127 0.000 0.110 1.228
CLAF
1.246
AFILE
SG6041.dat
SECTION
0.054 1.178 0.000 0.073 1.228
CLAF
1.246
AFILE
SG6041.dat
SECTION
0.073 1.217 0.000 0.000 1.228
CLAF
1.246
AFILE
SG6041.dat


SURFACE
hstab_panel_0
12 1.000 20 1.000
COMPONENT
2
YDUPLICATE
0.000
TRANSLATE
1.800 0.500 0.000
SECTION
0.000 0.000 0.000 0.150 0.164
CLAF
0.909
AFILE
SD8020-010-88.dat
CONTROL
elevator 1.000 0.700 0.000 0.000 0.000 1.000
SECTION
0.012 0.350 0.000 0.100 -0.016
CLAF
0.864
AFILE
SD8020-010-88.dat
CONTROL
elevator 1.000 0.700 0.000 0.000 0.000 1.000


SURFACE
fin_panel_0
12 1.000 20 1.000
COMPONENT
2
TRANSLATE
1.800 0.500 0.400
SECTION
0.000 0.000 -0.000 0.150 0.164
CLAF
0.909
AFILE
SD8020-010-88.dat
CONTROL
rudder 1.000 0.700 0.000 0.000 0.000 1.000
SECTION
0.012 0.000 -0.400 0.100 -0.016
CLAF
0.864
AFILE
SD8020-010-88.dat
CONTROL
rudder 1.000 0.700 0.000 0.000 0.000 1.000


SURFACE
hstab_panel_0
12 1.000 20 1.000
COMPONENT
3
YDUPLICATE
0.000
TRANSLATE
1.800 -0.500 0.000
SECTION
0.000 0.000 0.000 0.150 0.164
CLAF
0.909
AFILE
SD8020-010-88.dat
CONTROL
elevator 1.000 0.700 0.000 0.000 0.000 1.000
SECTION
0.012 0.350 0.000 0.100 -0.016
CLAF
0.864
AFILE
SD8020-010-88.dat
CONTROL
elevator 1.000 0.700 0.000 0.000 0.000 1.000


SURFACE
fin_panel_0
12 1.000 20 1.000
COMPONENT
3
TRANSLATE
1.800 -0.500 0.400
SECTION
0.000 0.000 -0.000 0.150 0.164
CLAF
0.909
AFILE
SD8020-010-88.dat
CONTROL
rudder 1.000 0.700 0.000 0.000 0.000 1.000
SECTION
0.012 0.000 -0.400 0.100 -0.016
CLAF
0.864
AFILE
SD8020-010-88.dat
CONTROL
rudder 1.000 0.700 0.000 0.000 0.000 1.000
