!***************************************
!Cold Draft F3A Plane AVL input dataset
!***************************************
Cold Draft
!Mach
 0.0
!IYsym   IZsym   Zsym
 0       0       0.0
!Sref    Cref    Bref
0.569124 0.31211 1.8594
!Xref    Yref    Zref
0.7     0.0      0.0

#--------------------------------------------------
SURFACE
WING
!Nchordwise  Cspace  Nspanwise  Sspace
1            1.0     16         -2.0
YDUPLICATE
0.0
ANGLE
0.0

!Xle    Yle    Zle     Chord   Ainc
!Wing Centre
SECTION
!Xle    Yle    Zle     Chord   Ainc
0.41    0.0    0.      0.448   0.

!Wing Root
SECTION
!Xle    Yle    Zle     Chord   Ainc
0.41    0.0785 0.      0.448   0.

!Aileron Inbd
SECTION
!Xle    Yle    Zle     Chord   Ainc
0.47197 0.2547 0.      0.38362 0.
CONTROL
aileron  1.0   0.22486  0.035 0.9994 0.0 -1.0
!Wing Tip
SECTION
!Xle    Yle    Zle     Chord   Ainc
0.70927 0.9297 0.      0.13838 0.
CONTROL
aileron  1.0   0.39572 0.035 0.9994 0.0  -1.0

#--------------------------------------------------
SURFACE
STAB
!Nchordwise  Cspace  Nspanwise  Sspace
1            1.0     16          -2.0
YDUPLICATE
0.0

!TailCentre
SECTION
1.63342 0.00 0.0     0.28295 0.


!Tail Root
SECTION
1.63342 0.0489 0.0     0.28295 0.
CONTROL
elevator 1.0   0.30998  0.049  0.9988  0.0  1.0

!Tail Tip
SECTION
1.79836 0.415  0.0     0.11801 0.
CONTROL
elevator 1.0   0.59139 0.049  0.9988  0.0  1.0


#----------------------------------------------------

SURFACE
FUSSIDE
!Nchordwise  Cspace  Nspanwise  Sspace
1            1.0     16          -2.0

!Btm
SECTION
!Xle    Yle    Zle     Chord   Ainc
0.18    0.0    -0.1949 0.5     0.

!bfinroot
SECTION
0.15245 0.00000 -0.15211 1.81325 0.
CONTROL
rudder 1.0   0.91689  0.0  0.0  1.0  1.0

!SpinLwr
SECTION
0.09000 0.00000 -0.05507 1.87570 0.
CONTROL
rudder 1.0   0.91966  0.0  0.0  1.0  1.0

!SpinUpr
SECTION
0.09000 0.00000 0.04993 1.87570 0.
CONTROL
rudder 1.0   0.91966  0.0  0.0  1.0  1.0

!tfinroot
SECTION
0.21079  0.00000  0.12369 1.75491 0.
CONTROL
rudder 1.0   0.91413  0.0  0.0  1.0  1.0

!CanTop
SECTION
0.385    0.0   0.23007 0.2 0.


#-------------------------------------------------------
SURFACE
TOPFIN
!Nchordwise  Cspace  Nspanwise  Sspace
1            1.0     16          -2.0

!Root
SECTION
1.51169  0  0.14764  0.45338  0.00
CONTROL
rudder 1.0 0.669 0.0 0.0 1.0 1.0

!Tip
SECTION
1.76501  0  0.34993  0.20006  0.00
CONTROL
rudder 1.0 0.24988 0.0 0.0 1.0 1.0


#-------------------------------------------------------
SURFACE
BTMFIN
!Nchordwise  Cspace  Nspanwise  Sspace
1            1.0     16          -2.0

!Root
SECTION
1.61407  0  -0.14286  0.35093  0.00
CONTROL
rudder 1.0 0.57236 0.0 0.0 1.0 1.0

!Tip
SECTION
1.70493  0  -0.20007  0.26007  0.00
CONTROL
rudder 1.0 0.42296 0.0 0.0 1.0 1.0
